# OpenSim document version 30000
InverseKinematicsTool subject01:
  results_directory: ./results/ik
  model_file: data/results/scaling/subject01_simbody.osim
  constraint_weight: 20
  accuracy: 1e-5
  marker_file: subject01_walk1.trc
  time_range: 0.5 2.5
  report_errors: true
  output_motion_file: results/ik/subject01_walk1_ik.mot
  IKTaskSet gait2392_IK:
    IKMarkerTask Sternum: apply=true weight=1
    IKMarkerTask R.Acromium: apply=true weight=0.5
    IKMarkerTask L.Acromium: apply=true weight=0.5
    IKMarkerTask Top.Head: apply=true weight=0.1
    IKMarkerTask R.ASIS: apply=true weight=10
    IKMarkerTask L.ASIS: apply=true weight=10
    IKMarkerTask V.Sacral: apply=true weight=10
    IKMarkerTask R.Thigh.Upper: apply=true weight=1
    IKMarkerTask R.Thigh.Front: apply=true weight=1
    IKMarkerTask R.Thigh.Rear: apply=true weight=1
    IKMarkerTask R.Shank.Upper: apply=true weight=1
    IKMarkerTask R.Shank.Front: apply=true weight=1
    IKMarkerTask R.Shank.Rear: apply=true weight=1
    IKMarkerTask R.Heel: apply=true weight=10
    IKMarkerTask R.Midfoot.Sup: apply=true weight=1
    IKMarkerTask R.Midfoot.Lat: apply=true weight=1
    IKMarkerTask R.Toe.Lat: apply=true weight=1
    IKMarkerTask R.Toe.Med: apply=true weight=1
    IKMarkerTask R.Toe.Tip: apply=true weight=10
    IKMarkerTask L.Thigh.Upper: apply=true weight=1
    IKMarkerTask L.Thigh.Front: apply=true weight=1
    IKMarkerTask L.Thigh.Rear: apply=true weight=1
    IKMarkerTask L.Shank.Upper: apply=true weight=1
    IKMarkerTask L.Shank.Front: apply=true weight=1
    IKMarkerTask L.Shank.Rear: apply=true weight=1
    IKMarkerTask L.Heel: apply=true weight=10
    IKMarkerTask L.Midfoot.Sup: apply=true weight=1
    IKMarkerTask L.Midfoot.Lat: apply=true weight=1
    IKMarkerTask L.Toe.Lat: apply=true weight=1
    IKMarkerTask L.Toe.Med: apply=true weight=1
    IKMarkerTask L.Toe.Tip: apply=true weight=10
    IKCoordinateTask subtalar_angle_r: apply=true weight=1000 value_type=default_value value=0
    IKCoordinateTask mtp_angle_r: apply=true weight=1000 value_type=default_value value=0
    IKCoordinateTask subtalar_angle_l: apply=true weight=1000 value_type=default_value value=0
    IKCoordinateTask mtp_angle_l: apply=true weight=1000 value_type=default_value value=0
